# Перевод из десятичной в шестнадцатеричную:
# Изначально мне показалось, что в маткаде будет проще и быстрее написать скрипт для пересчета в другие системы счисления, но по ходу дела выяснилось, что это совсем не так, он плохо подходит для подобных задач. Тем не менее, из упрямства я все таки сделал одну программу
x := 12345678
c' :=
    i ← 0
    while trunc(x/16) ≥ 16
        c[i, 0] ← mod(x, 16)
        x ← trunc(x/16)
        i ← i + 1
    c[i, 0] ← mod(x, 16)
    c[i + 1, 0] ← trunc(x/16)
    for i ∈ 0 .. last(c)
        a[i, 0] ← c[last(c) - i, 0]
    a
c :=
    for i ∈ 0 .. last(c')
        if c'[i, 0] == 10
            c[i, 0] ← "A"
        else if c'[i, 0] == 11
            c'[i, 0] ← "B"
        else if c'[i, 0] == 12
            c'[i, 0] ← "C"
        else if c'[i, 0] == 13
            c'[i, 0] ← "D"
        else if c'[i, 0] == 14
            c'[i, 0] ← "E"
        else if c'[i, 0] == 15
            c'[i, 0] ← "F"
        else
            c'[i, 0] ← num2str(c'[i, 0])
    transpose(c')
c = ["B", "C", "6", "1", "4", "E"]
x := 1000000
c' :=
    i ← 0
    while trunc(x/16) ≥ 16
        c[i, 0] ← mod(x, 16)
        x ← trunc(x/16)
        i ← i + 1
    c[i, 0] ← mod(x, 16)
    c[i + 1, 0] ← trunc(x/16)
    for i ∈ 0 .. last(c)
        a[i, 0] ← c[last(c) - i, 0]
    a
c :=
    for i ∈ 0 .. last(c')
        if c'[i, 0] == 10
            c[i, 0] ← "A"
        else if c'[i, 0] == 11
            c'[i, 0] ← "B"
        else if c'[i, 0] == 12
            c'[i, 0] ← "C"
        else if c'[i, 0] == 13
            c'[i, 0] ← "D"
        else if c'[i, 0] == 14
            c'[i, 0] ← "E"
        else if c'[i, 0] == 15
            c'[i, 0] ← "F"
        else
            c'[i, 0] ← num2str(c'[i, 0])
    transpose(c')
c = ["F", "4", "2", "4", "0"]
# 2. Перевод из шестнадцатеричной в десятеричную:
HEX_12345678 := 1*16^7 + 2*16^6 + 3*16^5 + 4*16^4 + 5*16^3 + 6*16^2 + 7*16^1 + 8*16^0 = 305419896
HEX_1000000 := 1*16^6 + 0*16^5 + 0*16^4 + 0*16^3 + 0*16^2 + 0*16^1 + 0*16^0 = 16777216
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